// COMSOL Multiphysics 5.6.0.280 model "demo-2 multi material diffusion.mph"
// Outline of the model tree

Parameters
  R1 = 4e-7
  R0 = 8e-7
  D1 = 7.08e-15
  J0 = 1e-3
  R2 = 6e-7
  D2 = 1e-14
  v = 0.3
  E1 = 1e10
  E2 = 4e9
  Omegac = 3.497e-6  // Diffusion partial molar volume
  Rg = 8.3145  // constant
  T = 300

Variables
  var1 "Variables 1"
    J1 = -D1*(c1x-Omegac*c1/Rg/T*dsigma_1)
    J2 = -D2*(c2x-Omegac*c2/Rg/T*dsigma_2)
    sigma11_1 = v*E1/(1+v)/(1-2*v)*(u1x+u1/x-Omegac*c1)+E1/(1+v)*(u1x-Omegac*c1/3)
    sigma22_1 = v*E1/(1+v)/(1-2*v)*(u1x+u1/x-Omegac*c1)+E1/(1+v)*(u1/x-Omegac*c1/3)
    sigma33_1 = v*E1/(1+v)/(1-2*v)*(u1x+u1/x-Omegac*c1)+E1/(1+v)*(-Omegac*c1/3)
    sigmam_1 = (sigma11_1+sigma22_1+sigma33_1)/3
    sigma11_2 = v*E2/(1+v)/(1-2*v)*(u2x+u2/x-Omegac*c2)+E2/(1+v)*(u2x-Omegac*c2/3)
    sigma22_2 = v*E2/(1+v)/(1-2*v)*(u2x+u2/x-Omegac*c2)+E2/(1+v)*(u2/x-Omegac*c2/3)
    sigma33_2 = v*E2/(1+v)/(1-2*v)*(u2x+u2/x-Omegac*c2)+E2/(1+v)*(-Omegac*c2/3)
    sigmam_2 = (sigma11_2+sigma22_2+sigma33_2)/3
    dsigma_2 = E2*(u2xx+u2x/x-u2/(x^2)-Omegac*c2x)/(3*(1-2*v))
    dsigma_1 = E1*(u1xx+u1x/x-u1/(x^2)-Omegac*c1x)/(3*(1-2*v))

Selections
  sel1: Explicit "left domain" on domains 1
  sel2: Explicit "right domain" on domains 2

Geometry
  geom1 "Geometry 1" (1D, length unit m)
    i1: Interval | coord = {R1, R2, R0}
    fin: Finalize "Form Union"

Physics
  c: CoefficientFormPDE on selection sel1
    dependent variable c1
    cfeq1: CoefficientFormPDE (default) | c = 0; f = -J1/x; da = 1; ga = J1
    zflx1: ZeroFluxBoundary "Zero Flux 1" (default)
    init1: init "Initial Values 1" (default)
    flux1: FluxBoundary "Flux/Source 1" on boundaries 1
    flux2: FluxBoundary "Flux/Source 2" on boundaries 2 | g = -J2
    dir1: DirichletBoundary "Dirichlet Boundary Condition 1" on boundaries 2 | r = c2
  c2: CoefficientFormPDE on selection sel2
    dependent variable c2
    cfeq1: CoefficientFormPDE (default) | c = 0; f = -J2/x; da = 1; ga = J2
    zflx1: ZeroFluxBoundary "Zero Flux 1" (default)
    init1: init "Initial Values 1" (default)
    flux1: FluxBoundary "Flux/Source 1" on boundaries 3 | g = J0
    flux2: FluxBoundary "Flux/Source 2" on boundaries 2 | g = J1
    dir1: DirichletBoundary "Dirichlet Boundary Condition 1" on boundaries 2 | r = c1
  c3: CoefficientFormPDE on selection sel1
    dependent variable u1
    cfeq1: CoefficientFormPDE (default) | c = 0; f = -(sigma11_1-sigma22_1)/x; da = 0; ga = sigma11_1
    zflx1: ZeroFluxBoundary "Zero Flux 1" (default)
    init1: init "Initial Values 1" (default)
    dir1: DirichletBoundary "Dirichlet Boundary Condition 1" on boundaries 2 | r = u2
    flux1: FluxBoundary "Flux/Source 1" on boundaries 2 | g = -sigma11_2
  c4: CoefficientFormPDE on selection sel2
    dependent variable u2
    cfeq1: CoefficientFormPDE (default) | c = 0; f = -(sigma11_2-sigma22_2)/x; da = 0; ga = sigma11_2
    zflx1: ZeroFluxBoundary "Zero Flux 1" (default)
    init1: init "Initial Values 1" (default)
    dir1: DirichletBoundary "Dirichlet Boundary Condition 1" on boundaries 2 | r = u1
    flux1: FluxBoundary "Flux/Source 1" on boundaries 2 | g = sigma11_1

Mesh
  mesh1 "Mesh 1"
    size: MeshSizeDefault | hmax = R0/200; hgrad = 1; custom = on
    edg1: Edge on remaining entities

Studies
  std1 "Study 1"
    time: Transient "Time Dependent" | tlist = 0,0.1*R0^2/D1,0.3*R0^2/D1,0.5*R0^2/D1,0.7*R0^2/D1,0.9*R0^2/D1,1.0*R0^2/D1

Solver configurations
  sol1 "Solution 1" (study std1)
    v1: Variables "Dependent Variables 1"
    t1: Time "Time-Dependent Solver 1"
      tlist = 0,0.1*R0^2/D1,0.3*R0^2/D1,0.5*R0^2/D1,0.7*R0^2/D1,0.9*R0^2/D1,1.0*R0^2/D1
      atolglobalvaluemethod = manual
      dDef: Direct | thresh = 0.1; rhob = 400
      fc1: FullyCoupled | linsolver = dDef

Datasets
  dset1: Solution | solution = sol1

Plots
  pg1: PlotGroup1D "1D Plot Group 1" | data = dset1
    lngr1: LineGraph on all domains | expr = c1*D1/R0/J0; xdata = expr; xdataexpr = x/R0
  pg2: PlotGroup1D "1D Plot Group 2" | data = dset1
    lngr1: LineGraph on all domains | expr = c2*D1/R0/J0; xdata = expr; xdataexpr = x/R0
  pg3: PlotGroup1D "1D Plot Group 3" | data = dset1
    lngr1: LineGraph on all domains | expr = u1/R0; xdata = expr; xdataexpr = x/R0
  pg4: PlotGroup1D "1D Plot Group 4" | data = dset1
    lngr1: LineGraph on all domains | expr = u2/R0; xdata = expr; xdataexpr = x/R0
  pg5: PlotGroup1D "1D Plot Group 5" | data = dset1
    lngr1: LineGraph on all domains | expr = sigma11_1/E1
  pg6: PlotGroup1D "1D Plot Group 6" | data = dset1
    lngr1: LineGraph on all domains | expr = sigma11_2/E1

Exports
  plot1: Plot | filename = E:\Wu\output data of multi material DIS\c_left.csv
  plot2: Plot | filename = E:\Wu\output data of multi material DIS\c_right.csv
  plot3: Plot | filename = E:\Wu\output data of multi material DIS\u_left.csv
  plot4: Plot | filename = E:\Wu\output data of multi material DIS\u_right.csv